Tue Dec 17 18:45:32 PST 2013
;; 2. Description: simplest model
;; x1. Author: ronkeizer
;; 3. Label:
$PROBLEM    PK
$INPUT      ID TIME DV AMT CMT MDV EVID WT CRCL AGE SEX CENT
$DATA       pktab1 IGNORE=@ ;
$SUBROUTINE ADVAN1 TRANS2
$PK

TVCL = THETA(1)
CL = TVCL * EXP(ETA(1))
TVV = THETA(2)
V = TVV * EXP(ETA(2))
S1 = V/1000

$ERROR

IPRED = F
ADD = SQRT(SIGMA(1,1))
W = ADD
Y = IPRED + EPS(1)
IRES = DV-IPRED
IWRES = IRES/W

$THETA  (2,10,100) ; CL
 (20,100,500) ; V
$OMEGA  BLOCK(2)
 0.2  ;     IIV CL
 0.1 0.2  ;     IIV V2
$SIGMA  100  ; Additive error PK
$ESTIMATION METHOD=1 INTER MAXEVAL=2000 NOABORT SIG=3 PRINT=1 POSTHOC
$COVARIANCE
$TABLE      ID TIME DV AMT CMT MDV EVID WT CRCL AGE SEX CENT IPRED
            IWRES NOPRINT ONEHEADER NOAPPEND FILE=mytab1
; Xpose
$TABLE      ID TIME DV MDV EVID IPRED IWRES CWRES ONEHEADER NOPRINT
            FILE=sdtab1
$TABLE      CL V ADD ONEHEADER NOPRINT FILE=patab1

NM-TRAN MESSAGES
 WARNINGS AND ERRORS (IF ANY) FOR PROBLEM    1
 (WARNING  2) NM-TRAN INFERS THAT THE DATA ARE POPULATION.
 (WARNING  79) SIGMA IS USED ON THE RIGHT. WITH A SUBSEQUENT RUN, IF AN
 INITIAL ESTIMATE OF A DIAGONAL BLOCK OF SIGMA IS TO BE COMPUTED BY
 NONMEM, THAT BLOCK WILL BE SET TO AN IDENTITY MATRIX DURING THAT
 COMPUTATION. THIS COULD LEAD TO AN ARITHMETIC EXCEPTION.*
 * THE MAXIMUM NUMBER OF WARNINGS OF ONE OR MORE TYPES WAS REACHED.
 IT IS POSSIBLE THAT SOME WARNING MESSAGES WERE SUPPRESSED.

1NONLINEAR MIXED EFFECTS MODEL PROGRAM (NONMEM) VERSION 7.2.0
 ORIGINALLY DEVELOPED BY STUART BEAL, LEWIS SHEINER, AND ALISON BOECKMANN
 CURRENT DEVELOPERS ARE ROBERT BAUER, ICON DEVELOPMENT SOLUTIONS,
 AND ALISON BOECKMANN. IMPLEMENTATION, EFFICIENCY, AND STANDARDIZATION
 PERFORMED BY NOUS INFOSYSTEMS.
 PROBLEM NO.:         1
 PK
 TOT. NO. OF OBS RECS:     1100
 TOT. NO. OF INDIVIDUALS:    100
 ONE COMPARTMENT MODEL (ADVAN1)
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 #TBLN:      1
 #METH: First Order Conditional Estimation with Interaction
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
 #TERM:
0MINIMIZATION SUCCESSFUL
 NO. OF FUNCTION EVALUATIONS USED:      255
 NO. OF SIG. DIGITS IN FINAL EST.:  3.4

 ETABAR IS THE ARITHMETIC MEAN OF THE ETA-ESTIMATES,
 AND THE P-VALUE IS GIVEN FOR THE NULL HYPOTHESIS THAT THE TRUE MEAN IS 0.

 ETABAR:        -2.8232E-03 -4.4803E-03
 SE:             1.8615E-02  3.3272E-02

 P VAL.:         8.7945E-01  8.9289E-01

 ETAshrink(%):   7.1714E+00  2.1157E+00
 EPSshrink(%):   5.6979E+00

 #TERE:
 Elapsed estimation time in seconds:     9.07
 Elapsed covariance time in seconds:     1.56

 ********************               FIRST ORDER CONDITIONAL ESTIMATION WITH INTERACTION              ********************
 #OBJT:**************                       MINIMUM VALUE OF OBJECTIVE FUNCTION                      ********************
 #OBJV:********************************************    12205.445       **************************************************

 ********************               FIRST ORDER CONDITIONAL ESTIMATION WITH INTERACTION              ********************
 ********************                             FINAL PARAMETER ESTIMATE                           ********************

 THETA - VECTOR OF FIXED EFFECTS PARAMETERS   *********
         TH 1      TH 2
         7.67E+00  9.77E+01

 OMEGA - COV MATRIX FOR RANDOM EFFECTS - ETAS  ********
            ETA1      ETA2
 ETA1
+        4.06E-02
 ETA2
+        6.23E-02  1.17E-01

 SIGMA - COV MATRIX FOR RANDOM EFFECTS - EPSILONS  ****
            EPS1
 EPS1
+        1.73E+04

 OMEGA - CORR MATRIX FOR RANDOM EFFECTS - ETAS  *******
            ETA1      ETA2
 ETA1
+        2.02E-01
 ETA2
+        9.05E-01  3.42E-01

 SIGMA - CORR MATRIX FOR RANDOM EFFECTS - EPSILONS  ***
            EPS1
 EPS1
+        1.31E+02

 ********************               FIRST ORDER CONDITIONAL ESTIMATION WITH INTERACTION              ********************
 ********************                            STANDARD ERROR OF ESTIMATE                          ********************

 THETA - VECTOR OF FIXED EFFECTS PARAMETERS   *********
         TH 1      TH 2
         2.00E-01  3.44E+00

 OMEGA - COV MATRIX FOR RANDOM EFFECTS - ETAS  ********
            ETA1      ETA2
 ETA1
+        8.61E-03
 ETA2
+        9.33E-03  1.53E-02

 SIGMA - COV MATRIX FOR RANDOM EFFECTS - EPSILONS  ****
            EPS1
 EPS1
+        1.42E+03

 OMEGA - CORR MATRIX FOR RANDOM EFFECTS - ETAS  *******
            ETA1      ETA2
 ETA1
+        2.14E-02
 ETA2
+        5.75E-02  2.24E-02

 SIGMA - CORR MATRIX FOR RANDOM EFFECTS - EPSILONS  ***
            EPS1
 EPS1
+        5.39E+00

 ********************               FIRST ORDER CONDITIONAL ESTIMATION WITH INTERACTION              ********************
 ********************                          COVARIANCE MATRIX OF ESTIMATE                         ********************

            TH 1      TH 2      OM11      OM12      OM22      SG11
 TH 1
+        4.00E-02
 TH 2
+        4.66E-01  1.18E+01
 OM11
+        3.55E-04  6.31E-03  7.42E-05
 OM12
+        2.65E-04  4.75E-03  6.15E-05  8.71E-05
 OM22
+        3.32E-04  4.74E-03  3.80E-05  9.94E-05  2.35E-04
 SG11
+       -1.88E+02 -4.20E+03 -1.57E+00  1.39E+00  4.49E+00  2.00E+06

 ********************               FIRST ORDER CONDITIONAL ESTIMATION WITH INTERACTION              ********************
 ********************                          CORRELATION MATRIX OF ESTIMATE                        ********************

            TH 1      TH 2      OM11      OM12      OM22      SG11
 TH 1
+        2.00E-01
 TH 2
+        6.78E-01  3.44E+00
 OM11
+        2.06E-01  2.13E-01  8.61E-03
 OM12
+        1.42E-01  1.48E-01  7.65E-01  9.33E-03
 OM22
+        1.08E-01  8.99E-02  2.88E-01  6.95E-01  1.53E-02
 SG11
+       -6.64E-01 -8.62E-01 -1.29E-01  1.05E-01  2.07E-01  1.42E+03
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