Tue Dec 25 00:06:09 CET 2012
;; 1. Based on: run2
;; 2. Description: +combined error model
;; x1. Author: user
;; 3. Label:
$PROBLEM    PK
$INPUT      ID TIME DV AMT CMT MDV EVID WT CRCL AGE SEX CENT
$DATA       pktab1 IGNORE=@ ;
$SUBROUTINE ADVAN3 TRANS4
$PK

TVCL = THETA(1)
CL = TVCL * EXP(ETA(1))
TVV1 = THETA(2)
V1 = TVV1 * EXP(ETA(2))
Q  = THETA(3)
V2 = THETA(4)
S1 = V1/1000

$ERROR

IPRED = F
Y = IPRED * (1+EPS(2))+ EPS(1)
ADD = SIGMA(1,1)
PROP = SIGMA(2,2)
W = SQRT(PROP*IPRED**2 + ADD)
IRES = DV-IPRED
IWRES = IRES/W

$THETA  (2,10,100) ; CL
 (20,100,500) ; V
 (0,10,100) ; Q
 (0,100,500) ; V2
$OMEGA  BLOCK(2)
 0.2  ;     IIV CL
 0.1 0.2  ;     IIV V2
$SIGMA  1  ; Additive error PK
 .01  ; Proportional error PK
$ESTIMATION METHOD=1 INTER MAXEVAL=2000 NOABORT SIG=4 PRINT=1 POSTHOC
$COVARIANCE
$TABLE      ID TIME DV AMT CMT MDV EVID WT CRCL AGE SEX CENT IPRED
            IWRES NOPRINT ONEHEADER NOAPPEND FILE=mytab3
; Xpose
$TABLE      ID TIME DV MDV EVID IPRED IWRES CWRES ONEHEADER NOPRINT
            FILE=sdtab3
$TABLE      CL V1 PROP ADD ONEHEADER NOPRINT FILE=patab3

NM-TRAN MESSAGES
 WARNINGS AND ERRORS (IF ANY) FOR PROBLEM    1
 (WARNING  2) NM-TRAN INFERS THAT THE DATA ARE POPULATION.
 (WARNING  79) SIGMA IS USED ON THE RIGHT. WITH A SUBSEQUENT RUN, IF AN
 INITIAL ESTIMATE OF A DIAGONAL BLOCK OF SIGMA IS TO BE COMPUTED BY
 NONMEM, THAT BLOCK WILL BE SET TO AN IDENTITY MATRIX DURING THAT
 COMPUTATION. THIS COULD LEAD TO AN ARITHMETIC EXCEPTION.*
 * THE MAXIMUM NUMBER OF WARNINGS OF ONE OR MORE TYPES WAS REACHED.
 IT IS POSSIBLE THAT SOME WARNING MESSAGES WERE SUPPRESSED.

1NONLINEAR MIXED EFFECTS MODEL PROGRAM (NONMEM) VERSION 7.2.0
 ORIGINALLY DEVELOPED BY STUART BEAL, LEWIS SHEINER, AND ALISON BOECKMANN
 CURRENT DEVELOPERS ARE ROBERT BAUER, ICON DEVELOPMENT SOLUTIONS,
 AND ALISON BOECKMANN. IMPLEMENTATION, EFFICIENCY, AND STANDARDIZATION
 PERFORMED BY NOUS INFOSYSTEMS.
 PROBLEM NO.:         1
 PK
 TOT. NO. OF OBS RECS:     1100
 TOT. NO. OF INDIVIDUALS:    100
 TWO COMPARTMENT MODEL (ADVAN3)
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 #TBLN:      1
 #METH: First Order Conditional Estimation with Interaction
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
 #TERM:
0MINIMIZATION SUCCESSFUL
 NO. OF FUNCTION EVALUATIONS USED:      287
 NO. OF SIG. DIGITS IN FINAL EST.:  4.2

 ETABAR IS THE ARITHMETIC MEAN OF THE ETA-ESTIMATES,
 AND THE P-VALUE IS GIVEN FOR THE NULL HYPOTHESIS THAT THE TRUE MEAN IS 0.

 ETABAR:         1.7367E-03 -1.1421E-03
 SE:             3.8853E-02  3.6130E-02

 P VAL.:         9.6435E-01  9.7478E-01

 ETAshrink(%):   1.8379E+00  5.7011E-01
 EPSshrink(%):   8.3510E+00  8.3510E+00

 #TERE:
 Elapsed estimation time in seconds:    20.94
 Elapsed covariance time in seconds:    11.69

 ********************               FIRST ORDER CONDITIONAL ESTIMATION WITH INTERACTION              ********************
 #OBJT:**************                       MINIMUM VALUE OF OBJECTIVE FUNCTION                      ********************
 #OBJV:********************************************    10916.405       **************************************************

 ********************               FIRST ORDER CONDITIONAL ESTIMATION WITH INTERACTION              ********************
 ********************                             FINAL PARAMETER ESTIMATE                           ********************

 THETA - VECTOR OF FIXED EFFECTS PARAMETERS   *********
         TH 1      TH 2      TH 3      TH 4
         4.79E+00  9.02E+01  7.47E+00  1.05E+02

 OMEGA - COV MATRIX FOR RANDOM EFFECTS - ETAS  ********
            ETA1      ETA2
 ETA1
+        1.58E-01
 ETA2
+        1.22E-01  1.33E-01

 SIGMA - COV MATRIX FOR RANDOM EFFECTS - EPSILONS  ****
            EPS1      EPS2
 EPS1
+        1.45E+03
 EPS2
+        0.00E+00  7.39E-03

 OMEGA - CORR MATRIX FOR RANDOM EFFECTS - ETAS  *******
            ETA1      ETA2
 ETA1
+        3.98E-01
 ETA2
+        8.42E-01  3.65E-01

 SIGMA - CORR MATRIX FOR RANDOM EFFECTS - EPSILONS  ***
            EPS1      EPS2
 EPS1
+        3.81E+01
 EPS2
+        0.00E+00  8.60E-02

 ********************               FIRST ORDER CONDITIONAL ESTIMATION WITH INTERACTION              ********************
 ********************                            STANDARD ERROR OF ESTIMATE                          ********************

 THETA - VECTOR OF FIXED EFFECTS PARAMETERS   *********
         TH 1      TH 2      TH 3      TH 4
         2.80E-01  3.53E+00  1.96E-01  7.72E+00

 OMEGA - COV MATRIX FOR RANDOM EFFECTS - ETAS  ********
            ETA1      ETA2
 ETA1
+        2.61E-02
 ETA2
+        1.74E-02  1.66E-02

 SIGMA - COV MATRIX FOR RANDOM EFFECTS - EPSILONS  ****
            EPS1      EPS2
 EPS1
+        1.83E+02
 EPS2
+       .........  6.47E-04

 OMEGA - CORR MATRIX FOR RANDOM EFFECTS - ETAS  *******
            ETA1      ETA2
 ETA1
+        3.28E-02
 ETA2
+        2.80E-02  2.27E-02

 SIGMA - CORR MATRIX FOR RANDOM EFFECTS - EPSILONS  ***
            EPS1      EPS2
 EPS1
+        2.41E+00
 EPS2
+       .........  3.76E-03

 ********************               FIRST ORDER CONDITIONAL ESTIMATION WITH INTERACTION              ********************
 ********************                          COVARIANCE MATRIX OF ESTIMATE                         ********************

            TH 1      TH 2      TH 3      TH 4      OM11      OM12      OM22      SG11      SG12      SG22
 TH 1
+        7.82E-02
 TH 2
+        6.91E-01  1.25E+01
 TH 3
+        8.53E-03  1.51E-01  3.83E-02
 TH 4
+       -1.51E+00 -4.86E+00 -6.54E-02  5.96E+01
 OM11
+       -3.39E-03 -1.06E-02 -1.10E-03  1.25E-01  6.81E-04
 OM12
+       -1.40E-03 -9.71E-04 -9.97E-04  5.11E-02  3.92E-04  3.03E-04
 OM22
+       -1.48E-04  5.53E-03 -9.55E-04  9.73E-03  2.05E-04  2.35E-04  2.75E-04
 SG11
+        2.23E+00 -3.23E+00 -2.54E+00  1.81E+01 -8.12E-01 -6.45E-01 -5.54E-01  3.36E+04
 SG12
+       ......... ......... ......... ......... ......... ......... ......... ......... .........
 SG22
+       -4.58E-05 -5.25E-04  7.91E-06  9.16E-04  3.49E-06  1.37E-06  8.80E-07 -8.11E-02 .........  4.18E-07

 ********************               FIRST ORDER CONDITIONAL ESTIMATION WITH INTERACTION              ********************
 ********************                          CORRELATION MATRIX OF ESTIMATE                        ********************

            TH 1      TH 2      TH 3      TH 4      OM11      OM12      OM22      SG11      SG12      SG22
 TH 1
+        2.80E-01
 TH 2
+        7.00E-01  3.53E+00
 TH 3
+        1.56E-01  2.18E-01  1.96E-01
 TH 4
+       -7.01E-01 -1.78E-01 -4.33E-02  7.72E+00
 OM11
+       -4.65E-01 -1.15E-01 -2.14E-01  6.19E-01  2.61E-02
 OM12
+       -2.87E-01 -1.58E-02 -2.92E-01  3.80E-01  8.62E-01  1.74E-02
 OM22
+       -3.19E-02  9.44E-02 -2.94E-01  7.59E-02  4.73E-01  8.15E-01  1.66E-02
 SG11
+        4.36E-02 -4.99E-03 -7.09E-02  1.28E-02 -1.70E-01 -2.02E-01 -1.82E-01  1.83E+02
 SG12
+       ......... ......... ......... ......... ......... ......... ......... ......... .........
 SG22
+       -2.53E-01 -2.30E-01  6.25E-02  1.83E-01  2.07E-01  1.22E-01  8.20E-02 -6.85E-01 .........  6.47E-04
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